variable t equal 1000
units metal
dimension 3
boundary p p p
atom_style atomic
lattice bcc 2.863
region box block 0 20 0 20 0 20
create_box 2 box
 create_atoms 1 box
 create_atoms 2 random 160 666 NULL

 pair_style meam
 pair_coeff * * library.meam Fe H FeH.meam Fe H

 mass 1 55.85
 mass 2 1

 thermo 1000
 timestep 0.0005

 group hydrogen type 2

 min_style cg
 minimize 1e-8 1e-8 10000 10000

 velocity all create $t 666 dist gaussian
 fix 1 all npt temp $t $t 0.1 iso 0 0 0.1
 run 10000
 unfix 1

 fix 2 all nvt temp $t $t 0.1 drag 1

 compute 1 hydrogen msd
 variable msd equal c_1[4]
 variable step1 equal (step-10000)*0.0005

 fix log hydrogen print 1000 "${step1} ${msd}" file result_msd_${t}
 dump 1 all custom 5000 dump_msd_${t} id type x y z
 run 300000
 unfix 2
